# Calibration of IMU Sensors (e.g. MPU 6050)
# 1. Introdruction
# - Typical IMU problems: bias, drift, scale-factor errors, cross-axis sensitivity.
# - Goal: improve accuracy of sensor readings for applications (e.g., robotics, sensor fusion, navigation).
# 2. Theoretical Background
# Accelerometer: | - Measures specific force → gravity in static conditions.
# - Ideal: ±1 g depending on orientation, 0 g on the other axes.
# Gyroscope: | - Measures angular velocity in °/s.
# - Ideal: 0 at rest, ±Ω when rotating with known speed.
# Error sources: | - Bias (offset at zero input).
# - Scale factor error (counts per g or °/s deviate from datasheet).
# - Cross-axis sensitivity (axes are not perfectly independent).
# - Noise and drift.
# 3. Measurement Procedure
# - Accelerometer → 6 orientations (±X, ±Y, ±Z).
# -->Example Values:
x_plus := 0.95
y_plus := 1.1
z_plus := 0.98
x_minus := -0.99
y_minus := -1.02
z_minus := -1.08
# - Gyroscope → Rest (still) and rotations at known angular velocities.
# 4. Bias Estimation
# Accelerometer:
b_x := (x_plus + x_minus)/2
b_y := (y_plus + y_minus)/2
b_z := (z_plus + z_minus)/2
# Bias Vector
b := [b_x; b_y; b_z] = [-0.02; 0.04; -0.05]
# Gyroscope:
